# Unidades
uA := 10^-3*mA
um := 10^-6*m
fF := 10^-15*farad
q := 1.6*10^-19*coul
pF := 10^-12*farad
Hz = 1 1/s
mA := 10^-3*A
# Dados
I_B := 55*uA
C_L := 1*pF
V_DD := 1.2*V
K_B := 1.38*10^-23*joule/K
V_Dsat2n := 100*mV
V_Dsat2p := 100*mV
V_Dsat4 := 100*mV
V_Dsat6 := 100*mV
V_Dsat8 := 100*mV
V_Dsat11 := 100*mV
L2n := 0.5*um
L2p := 0.5*um
L4 := 0.5*um
L6 := 0.5*um
L8 := 0.5*um
L11 := 0.5*um
V_bs4 := 250*mV
V_bs6 := 250*mV
V_bs8 := 0*mV
V_bs11 := 0*mV
V_bs2n := 250*mV
V_bs2p := 250*mV
# Definições da Tecnologia
V_TN := 0.38*volt
K_N := 500*uA*volt^-2  # Na aula ele mudou o Kn para 450
BE := 0.700
V_TP := 0.33*volt
K_P := 100*uA*volt^-2
CGSD0 := 0.30*fF/um
# Capacidade de overlap
K_B*300*K/q = 0.025875 V
CGOX := 12.3*fF/um^2  # Capacidade por unidade de area da gate
Sd_s := 0.4*um  # lado do dreno ou source
CJN := 0.722*fF/um^2
CJP := 0.953*fF/um^2  # Capacidade por unidade de area de um diodo
PBN := 0.62*volt
PBP := 0.684*volt  # Potencial da juncao
MJN := 0.264
MJP := 0.295  # Coeficiente de ajuste
CJSWN := 0.0993*fF/um
CJSWP := 0.105*fF/um  # Capacidade lateral por unidade de perimetro
MJSWN := 0.105
MJSWP := 0.135  # Coeficiente de ajuste
# Características dos Transistores
gm(I_D, V_Dsat) := if(V_Dsat < K_B*300*K/q*2, I_D/(K_B*300*K/q), 2*I_D/V_Dsat)
W_L_N(I_D, V_Dsat) := 2*I_D/(K_N*V_Dsat^2)
W_L_P(I_D, V_Dsat) := 2*I_D/(K_P*V_Dsat^2)
W_N(I_D, V_Dsat, L) := 2*I_D*L/(K_N*V_Dsat^2)
W_P(I_D, V_Dsat, L) := 2*I_D*L/(K_P*V_Dsat^2)
C_gdN(I_D, V_Dsat, L) := W_L_N(I_D, V_Dsat)*L*CGSD0
g_dsN(I_D, L) := I_D/(5749*mV/um*L)
C_gdP(I_D, V_Dsat, L) := W_L_P(I_D, V_Dsat)*L*CGSD0
g_dsP(I_D, L) := I_D/(11705*mV/um*L)
C_gsN(I_D, V_Dsat, L) := 2/3*(W_L_N(I_D, V_Dsat)*L^2)*CGOX
C_gsP(I_D, V_Dsat, L) := 2/3*(W_L_P(I_D, V_Dsat)*L^2)*CGOX
C_dbN(I_D, V_Dsat, L, V_db) := ((W_L_N(I_D, V_Dsat)*L) + Sd_s)*2*CJSWN/(1 + V_db/PBN)^MJSWN + W_L_N(I_D, V_Dsat)*L*Sd_s*CJN/(1 + V_db/PBN)^MJN
C_dbP(I_D, V_Dsat, L, V_bd) := ((W_L_P(I_D, V_Dsat)*L) + Sd_s)*2*CJSWP/(1 + V_bd/PBP)^MJSWP + W_L_P(I_D, V_Dsat)*L*Sd_s*CJP/(1 + V_bd/PBP)^MJP
C_sbP(I_D, V_Dsat, L, V_bs) := W_L_P(I_D, V_Dsat)*L*(Sd_s + L)*CJP/(1 - V_bs/PBP)^MJP + (W_L_P(I_D, V_Dsat)*L + Sd_s)*2*CJSWP/(1 - V_bs/PBP)^MJSWP + 2*W_L_P(I_D, V_Dsat)*L^2*CJP/(3*(1 - V_bs/PBP)^MJP)
C_sbN(I_D, V_Dsat, L, V_bs) := W_L_N(I_D, V_Dsat)*L*(Sd_s + L)*CJN/(1 - V_bs/PBN)^MJN + (W_L_N(I_D, V_Dsat)*L + Sd_s)*2*CJSWN/(1 - V_bs/PBN)^MJSWN + 2*W_L_N(I_D, V_Dsat)*L^2*CJN/(3*(1 - V_bs/PBN)^MJN)
# Características do Circuito
g_oP(I_B, V_Dsat4, L2n, L4, L11) := (g_dsP(I_B, L11) + g_dsN(I_B/2, L2n))*g_dsP(I_B/2, L4)/(BE*gm(I_B/2, V_Dsat4))
g_oN(I_B, V_Dsat6, L6, L8, L2p) := (g_dsN(I_B/2, L8) + g_dsP(I_B/2, L2p))*g_dsN(I_B/2, L6)/(BE*gm(I_B/2, V_Dsat6))
gain(I_B, V_Dsat2p, V_Dsat2n, V_Dsat4, V_Dsat6, L2n, L2p, L4, L6, L8, L11) := BE*(gm(I_B/2, V_Dsat2p) + gm(I_B/2, V_Dsat2n))/(g_oP(I_B, V_Dsat4, L2n, L4, L11) + g_oN(I_B, V_Dsat6, L6, L8, L2p))
C_out(I_B, V_Dsat6, V_Dsat4, L6, L4) := C_L + C_dbN(I_B/2, V_Dsat6, L6, V_bs6) + C_dbP(I_B/2, V_Dsat4, L4, V_bs4) + C_gdN(I_B/2, V_Dsat6, L6) + C_gdP(I_B/2, V_Dsat4, L4)
GBW(I_B, V_Dsat2p, V_Dsat2n, V_Dsat6, V_Dsat4, L6, L4) := BE*(gm(I_B/2, V_Dsat2p) + gm(I_B/2, V_Dsat2n))/(C_out(I_B, V_Dsat6, V_Dsat4, L6, L4)*2.*π)
C_dif2(I_B, V_Dsat2n, V_Dsat4, V_Dsat11, L2n, L4, L11) := C_dbN(I_B/2, V_Dsat2n, L2n, V_bs2n) + C_dbP(I_B, V_Dsat11, L11, V_bs11) + C_gdP(I_B, V_Dsat11, L11) + C_gdN(I_B/2, V_Dsat2n, L2n) + C_gsP(I_B/2, V_Dsat4, L4) + C_sbP(I_B/2, V_Dsat4, L4, V_bs4)
fp2(I_B, V_Dsat2n, V_Dsat4, V_Dsat11, L2n, L4, L11) := BE*gm(I_B/2, V_Dsat4)/(C_dif2(I_B, V_Dsat2n, V_Dsat4, V_Dsat11, L2n, L4, L11)*2*π)
C_dif3(I_B, V_Dsat6, V_Dsat8, L6, L8, V_Dsat2p, L2p) := C_dbN(I_B, V_Dsat8, L8, V_bs8) + C_gdN(I_B, V_Dsat8, L8) + C_gsN(I_B/2, V_Dsat6, L6) + C_sbN(I_B/2, V_Dsat6, L6, V_bs6) + C_dbP(I_B/2, V_Dsat2p, L2p, V_bs2p) + C_gdP(I_B/2, V_Dsat2p, L2p)
fp3(I_B, V_Dsat6, V_Dsat8, V_Dsat2p, L6, L8, L2p) := BE*gm(I_B/2, V_Dsat6)/(C_dif3(I_B, V_Dsat6, V_Dsat8, L6, L8, V_Dsat2p, L2p)*2*π)
OS(V_DD, V_Dsat6, V_Dsat8, V_Dsat4, V_Dsat11) := V_DD - V_Dsat6 - V_Dsat8 - V_Dsat4 - V_Dsat11 - 0.08*V
ENF(I_B, V_Dsat2n, V_Dsat2p, V_Dsat8, V_Dsat11) := (2 + gm(I_B, V_Dsat11)/(BE*(gm(I_B/2, V_Dsat2n) + gm(I_B/2, V_Dsat2p))) + gm(I_B, V_Dsat8)/(BE*(gm(I_B/2, V_Dsat2n) + gm(I_B/2, V_Dsat2p))))
# Gráficos das Grandezas do Circuito
# PARA FAZER UM INDICE "de Array": AltGr + [
# PARA FAZER UM INDICE "Cosmestico": . (ponto)
i := 1 .. 100
V_Dsat[i] := 50*mV + i/100*100*mV
L[i] := 0.36*um + i/100*0.76*um
I[i] := 10*uA + i/100*500*uA
# [plot: gain(I_B, V_Dsat[i], V_Dsat2n, V_Dsat4, V_Dsat6, L2n, L2p, L4, L6, L8, L11), gain(I_B, V_Dsat2p, V_Dsat[i], V_Dsat4, V_Dsat6, L2n, L2p, L4, L6, L8, L11), gain(I_B, V_Dsat2p, V_Dsat2n, V_Dsat[i], V_Dsat6, L2n, L2p, L4, L6, L8, L11), gain(I_B, V_Dsat2p, V_Dsat2n, V_Dsat4, V_Dsat[i], L2n, L2p, L4, L6, L8, L11) vs V_Dsat[i]]
# [plot: gain(I_B, V_Dsat2p, V_Dsat2n, V_Dsat4, V_Dsat6, L2p, L2p, L4, L6, L8, L11) vs I[i]]
# [plot: gain(I_B, V_Dsat2p, V_Dsat2n, V_Dsat4, V_Dsat6, L[i], L2p, L4, L6, L8, L11), gain(I_B, V_Dsat2p, V_Dsat2n, V_Dsat4, V_Dsat6, L2n, L[i], L4, L6, L8, L11), gain(I_B, V_Dsat2p, V_Dsat2n, V_Dsat4, V_Dsat6, L2n, L2p, L[i], L6, L8, L11), gain(I_B, V_Dsat2p, V_Dsat2n, V_Dsat4, V_Dsat6, L2n, L2p, L4, L[i], L8, L11), gain(I_B, V_Dsat2p, V_Dsat2n, V_Dsat4, V_Dsat6, L2n, L2p, L4, L6, L[i], L11) vs L[i]]
# [plot: GBW(I_B, V_Dsat[i], V_Dsat2n, V_Dsat6, V_Dsat4, L6, L4), GBW(I_B, V_Dsat2p, V_Dsat[i], V_Dsat6, V_Dsat4, L6, L4), GBW(I_B, V_Dsat2p, V_Dsat2n, V_Dsat[i], V_Dsat4, L6, L4), GBW(I_B, V_Dsat2p, V_Dsat2n, V_Dsat6, V_Dsat[i], L6, L4) vs V_Dsat[i]]
# [plot: GBW(I[i], V_Dsat2p, V_Dsat2n, V_Dsat6, V_Dsat4, L6, L4) vs I[i]]
# [plot: GBW(I_B, V_Dsat2p, V_Dsat2n, V_Dsat6, V_Dsat4, L[i], L4), GBW(I_B, V_Dsat2p, V_Dsat2n, V_Dsat6, V_Dsat4, L6, L[i]) vs L[i]]
# [plot: fp2(I_B, V_Dsat2n, V_Dsat4, V_Dsat11, L[i], L4, L11), fp2(I_B, V_Dsat2n, V_Dsat4, V_Dsat11, L2n, L[i], L11), fp2(I_B, V_Dsat2n, V_Dsat4, V_Dsat11, L2n, L4, L[i]) vs L[i]]
# [plot: fp2(I[i], V_Dsat2n, V_Dsat4, V_Dsat11, L2n, L4, L11) vs I[i]]
# [plot: fp2(I_B, V_Dsat[i], V_Dsat4, V_Dsat11, L2n, L4, L11), fp2(I_B, V_Dsat2n, V_Dsat[i], V_Dsat11, L2n, L4, L11), fp2(I_B, V_Dsat2n, V_Dsat4, V_Dsat[i], L2n, L4, L11) vs V_Dsat[i]]
# [plot: fp3(I[i], V_Dsat6, V_Dsat8, V_Dsat2p, L6, L8, L2p) vs I[i]]
# [plot: fp3(I_B, V_Dsat6, V_Dsat8, V_Dsat2p, L[i], L8, L2p), fp3(I_B, V_Dsat6, V_Dsat8, V_Dsat2p, L6, L[i], L2p), fp3(I_B, V_Dsat6, V_Dsat8, V_Dsat2p, L6, L8, L[i]) vs L[i]]
# [plot: fp3(I_B, V_Dsat[i], V_Dsat8, V_Dsat2p, L6, L8, L2n), fp3(I_B, V_Dsat6, V_Dsat[i], V_Dsat2p, L6, L8, L2n), fp3(I_B, V_Dsat6, V_Dsat8, V_Dsat[i], L6, L8, L2n) vs V_Dsat[i]]
# [plot: ENF(I[i], V_Dsat2n, V_Dsat2p, V_Dsat8, V_Dsat11) vs I[i]]
# [plot: ENF(I_B, V_Dsat[i], V_Dsat2p, V_Dsat8, V_Dsat11), ENF(I_B, V_Dsat2n, V_Dsat[i], V_Dsat8, V_Dsat11), ENF(I_B, V_Dsat2n, V_Dsat2p, V_Dsat[i], V_Dsat11), ENF(I_B, V_Dsat2n, V_Dsat2p, V_Dsat8, V_Dsat[i]) vs V_Dsat[i]]
# Optimização do Circuito
V_Dsat2n := 50*mV
V_Dsat2p := 50*mV
V_Dsat4 := 60*mV
V_Dsat6 := 60*mV
V_Dsat8 := 150*mV
V_Dsat11 := 150*mV
L2n := 0.36*um
L2p := 0.5*um
L4 := 0.36*um
L6 := 0.36*um
L8 := 0.36*um
L11 := 0.36*um
I_B := 55*uA
20*log(gain(I_B, V_Dsat2p, V_Dsat2n, V_Dsat4, V_Dsat6, L2n, L2p, L4, L6, L8, L11)) = 67.3234
GBW(I_B, V_Dsat2p, V_Dsat2n, V_Dsat6, V_Dsat4, L6, L4) = 224428540 1/s
# Specifications:
# A>=66dB (2000 V/V)
# GBW>=100 MHz
# fp2>>200 MHz
# fp3>1 GHz
# Os>=0.5 V
# ENF<4
#
# Constraints:
# 360 nm <= L <= 1.0 um
# 50 mV <= Vdsat <= 150 mV
fp2(I_B, V_Dsat2n, V_Dsat4, V_Dsat11, L2n, L4, L11) = 389059259 1/s
fp3(I_B, V_Dsat6, V_Dsat8, V_Dsat2p, L6, L8, L2n) = 894709132 1/s
OS(V_DD, V_Dsat6, V_Dsat8, V_Dsat4, V_Dsat11) = 0.7 V
ENF(I_B, V_Dsat2n, V_Dsat2p, V_Dsat8, V_Dsat11) = 2.98571
P_D := V_DD*(3*I_B + 4*I_B/10)
P_D = 0.0002244 W
FoM := GBW(I_B, V_Dsat2p, V_Dsat2n, V_Dsat6, V_Dsat4, L6, L4)*1000*C_L/P_D
FoM = 1000.13 1/V^2
# w1=w2, usado no cadence;
W_2n := W_N(I_B/2, BE*V_Dsat2n, L2n) = 3.23265e-5 m
W_2p := W_P(I_B/2, BE*V_Dsat2p, L2p) = 0.00022449 m
W_4 := W_P(I_B/2, BE*V_Dsat4, L4) = 0.000112245 m
W_6 := W_N(I_B/2, BE*V_Dsat6, L6) = 2.2449e-5 m
W_8 := W_N(I_B, V_Dsat8, L8) = 3.52e-6 m
W_11 := W_P(I_B, V_Dsat11, L11) = 1.76e-5 m
W_MB5 := W_N(I_B/10, V_Dsat8 + BE*V_Dsat6 + 100*mV, 2*um) = 5.16044e-7 m  # Lmb5=3,8um
W_MB6 := W_P(I_B/10, V_Dsat11 + BE*V_Dsat4 + 100*mV, 0.5*um) = 6.45055e-7 m  # Lmb6=1,2um
# WMB1=WMB4=WMB2; | WM0 = 10*WMB1
W_MB1 := W_P(I_B/10, V_Dsat11, L11) = 1.76e-6 m
# Wmb3=Wmb7; | WM9 = 10*WMB3
W_MB3 := W_N(I_B/10, V_Dsat8, L8) = 3.52e-7 m
Area := (10*W_MB1*L11) + (2*W_2p*L2p) + (2*W_2n*L2n) + (10*W_MB3*L8) + (2*W_11*L11) + (2*W_4*L4) + (2*W_6*L6) + (2*W_8*L8) + (3*W_MB1*L11) + (W_MB6*0.5*um) + (W_MB5*2*um) + (2*W_MB3*L8)
Area = 3.71063e-10 m^2
